*HEADING
V10U independent linear B32R cantilever benchmark: v10u_mesh_128
*NODE,NSET=ALL
1,0.000000000000,0.0,0.0
2,7.812500000000,0.0,0.0
3,15.625000000000,0.0,0.0
4,23.437500000000,0.0,0.0
5,31.250000000000,0.0,0.0
6,39.062500000000,0.0,0.0
7,46.875000000000,0.0,0.0
8,54.687500000000,0.0,0.0
9,62.500000000000,0.0,0.0
10,70.312500000000,0.0,0.0
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*ELEMENT,TYPE=B32R,ELSET=BEAM
1,1,2,3
2,3,4,5
3,5,6,7
4,7,8,9
5,9,10,11
6,11,12,13
7,13,14,15
8,15,16,17
9,17,18,19
10,19,20,21
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*NSET,NSET=FIXED
1
*NSET,NSET=TIP
257
*MATERIAL,NAME=GENERIC_LINEAR_ELASTIC
*ELASTIC
200000.000000000000,0.300000000000
*BEAM SECTION,ELSET=BEAM,MATERIAL=GENERIC_LINEAR_ELASTIC,SECTION=RECT
100.000000000000,100.000000000000
0.0,1.0,0.0
*STEP
*STATIC
*BOUNDARY
FIXED,1,6
*CLOAD
TIP,3,-10000.000000000000
*NODE FILE
U,RF
*EL FILE
S,E
*NODE PRINT,NSET=TIP,FREQUENCY=1
U
*NODE PRINT,NSET=FIXED,TOTALS=ONLY,FREQUENCY=1
RF
*END STEP
