*HEADING
V10V independent B32R column benchmark: v10v_eigen_064
*NODE,NSET=ALL
1,0.000000000000,0.000000000000,0.000000000000
2,0.000000000000,0.000000000000,15.625000000000
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*ELEMENT,TYPE=B32R,ELSET=COLUMN
1,1,2,3
2,3,4,5
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*NSET,NSET=BOTTOM
1
*NSET,NSET=MID
65
*NSET,NSET=TOP
129
*MATERIAL,NAME=GENERIC_LINEAR_ELASTIC
*ELASTIC
200000.000000000000,0.300000000000
*BEAM SECTION,ELSET=COLUMN,MATERIAL=GENERIC_LINEAR_ELASTIC,SECTION=RECT
40.000000000000,40.000000000000
0.0,1.0,0.0
*STEP
*BUCKLE
6,0.01
*BOUNDARY
BOTTOM,1,3
BOTTOM,6,6
TOP,1,2
*CLOAD
TOP,3,-1.000000000000
*NODE FILE
U
*END STEP
