*HEADING
V10X independent cyclic plasticity C3D8 benchmark: v10x_cyclic_032
*NODE,NSET=ALL
1,0.000000000000,-5.000000000000,-5.000000000000
2,0.000000000000,-5.000000000000,0.000000000000
3,0.000000000000,-5.000000000000,5.000000000000
4,0.000000000000,0.000000000000,-5.000000000000
5,0.000000000000,0.000000000000,0.000000000000
6,0.000000000000,0.000000000000,5.000000000000
7,0.000000000000,5.000000000000,-5.000000000000
8,0.000000000000,5.000000000000,0.000000000000
9,0.000000000000,5.000000000000,5.000000000000
10,31.250000000000,-5.000000000000,-5.000000000000
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*ELEMENT,TYPE=C3D8,ELSET=BAR
1,1,10,13,4,2,11,14,5
2,2,11,14,5,3,12,15,6
3,4,13,16,7,5,14,17,8
4,5,14,17,8,6,15,18,9
5,10,19,22,13,11,20,23,14
6,11,20,23,14,12,21,24,15
7,13,22,25,16,14,23,26,17
8,14,23,26,17,15,24,27,18
9,19,28,31,22,20,29,32,23
10,20,29,32,23,21,30,33,24
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*NSET,NSET=BASE
1,2,3,4,5,6,7,8,9
*NSET,NSET=TIP
289,290,291,292,293,294,295,296,297
*NSET,NSET=YSYM
4,5,6,13,14,15,22,23,24,31,32,33,40,41,42,49
50,51,58,59,60,67,68,69,76,77,78,85,86,87,94,95
96,103,104,105,112,113,114,121,122,123,130,131,132,139,140,141
148,149,150,157,158,159,166,167,168,175,176,177,184,185,186,193
194,195,202,203,204,211,212,213,220,221,222,229,230,231,238,239
240,247,248,249,256,257,258,265,266,267,274,275,276,283,284,285
292,293,294
*NSET,NSET=ZSYM
2,5,8,11,14,17,20,23,26,29,32,35,38,41,44,47
50,53,56,59,62,65,68,71,74,77,80,83,86,89,92,95
98,101,104,107,110,113,116,119,122,125,128,131,134,137,140,143
146,149,152,155,158,161,164,167,170,173,176,179,182,185,188,191
194,197,200,203,206,209,212,215,218,221,224,227,230,233,236,239
242,245,248,251,254,257,260,263,266,269,272,275,278,281,284,287
290,293,296
*MATERIAL,NAME=GENERIC_LINEAR_HARDENING
*ELASTIC
200000.000000000000,0.300000000000
*PLASTIC
250.000000000000,0.000000000000
275.000000000000,0.025000000000
*SOLID SECTION,ELSET=BAR,MATERIAL=GENERIC_LINEAR_HARDENING
*STEP,INC=1000
*STATIC
0.02,1,1e-08,0.05
*BOUNDARY
BASE,1,1,0.0
YSYM,2,2,0.0
ZSYM,3,3,0.0
TIP,1,1,2.500000000000
*NODE FILE
U,RF
*NODE PRINT,NSET=TIP,FREQUENCY=1
U
*NODE PRINT,NSET=BASE,TOTALS=ONLY,FREQUENCY=1
RF
*NODE PRINT,NSET=TIP,TOTALS=ONLY,FREQUENCY=1
RF
*END STEP
*STEP,INC=1000
*STATIC
0.02,1,1e-08,0.05
*BOUNDARY
BASE,1,1,0.0
YSYM,2,2,0.0
ZSYM,3,3,0.0
TIP,1,1,0.000000000000
*NODE FILE
U,RF
*NODE PRINT,NSET=TIP,FREQUENCY=1
U
*NODE PRINT,NSET=BASE,TOTALS=ONLY,FREQUENCY=1
RF
*NODE PRINT,NSET=TIP,TOTALS=ONLY,FREQUENCY=1
RF
*END STEP
*STEP,INC=1000
*STATIC
0.02,1,1e-08,0.05
*BOUNDARY
BASE,1,1,0.0
YSYM,2,2,0.0
ZSYM,3,3,0.0
TIP,1,1,-2.500000000000
*NODE FILE
U,RF
*NODE PRINT,NSET=TIP,FREQUENCY=1
U
*NODE PRINT,NSET=BASE,TOTALS=ONLY,FREQUENCY=1
RF
*NODE PRINT,NSET=TIP,TOTALS=ONLY,FREQUENCY=1
RF
*END STEP
*STEP,INC=1000
*STATIC
0.02,1,1e-08,0.05
*BOUNDARY
BASE,1,1,0.0
YSYM,2,2,0.0
ZSYM,3,3,0.0
TIP,1,1,0.000000000000
*NODE FILE
U,RF
*NODE PRINT,NSET=TIP,FREQUENCY=1
U
*NODE PRINT,NSET=BASE,TOTALS=ONLY,FREQUENCY=1
RF
*NODE PRINT,NSET=TIP,TOTALS=ONLY,FREQUENCY=1
RF
*END STEP
*STEP,INC=1000
*STATIC
0.02,1,1e-08,0.05
*BOUNDARY
BASE,1,1,0.0
YSYM,2,2,0.0
ZSYM,3,3,0.0
TIP,1,1,2.500000000000
*NODE FILE
U,RF
*NODE PRINT,NSET=TIP,FREQUENCY=1
U
*NODE PRINT,NSET=BASE,TOTALS=ONLY,FREQUENCY=1
RF
*NODE PRINT,NSET=TIP,TOTALS=ONLY,FREQUENCY=1
RF
*END STEP
