*HEADING
V8D v8d_f95_c705_t406p5_i1000
*NODE
1,0.000000000,-167.030400000,0.000000000
2,0.000000000,-139.192000000,0.000000000
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*ELEMENT,TYPE=S4R,ELSET=WEB
1,1,2,39,38
2,2,3,40,39
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*ELEMENT,TYPE=S4R,ELSET=TOPFLANGE
289,14,15,52,51
290,15,16,53,52
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*ELEMENT,TYPE=S4R,ELSET=BOTTOMFLANGE
577,26,27,64,63
578,27,28,65,64
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*NSET,NSET=BASE
1,2,3,4,5,6
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*NSET,NSET=TOP
889,890,891,892,893,894
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*NSET,NSET=BASE_REF
926
*NSET,NSET=BASE_ROT
927
*NSET,NSET=TOP_REF
928
*NSET,NSET=TOP_ROT
929
*RIGID BODY,NSET=BASE,REF NODE=926,ROT NODE=927
*RIGID BODY,NSET=TOP,REF NODE=928,ROT NODE=929
*MATERIAL,NAME=STEEL
*ELASTIC
178200.115757720,0.3
*PLASTIC
215.635442115,0.
217.791796536,0.10
*SHELL SECTION,ELSET=WEB,MATERIAL=STEEL
7.823200000
*SHELL SECTION,ELSET=TOPFLANGE,MATERIAL=STEEL
13.411200000
*SHELL SECTION,ELSET=BOTTOMFLANGE,MATERIAL=STEEL
13.411200000
*STEP,NLGEOM,INC=1000
*STATIC
0.002,1.,1.e-8,0.02
*BOUNDARY
BASE_REF,1,3
BASE_ROT,3,3
TOP_REF,1,2
TOP_REF,3,3,-400.0
*NODE PRINT,NSET=TOP_REF,FREQUENCY=1
U
*NODE PRINT,NSET=BASE_REF,TOTALS=ONLY,FREQUENCY=1
RF
*NODE PRINT,NSET=BASE,TOTALS=ONLY,FREQUENCY=1
RF
*END STEP
