*HEADING
V8C elastic Euler validation: v8c_f93_c501_14wf500
*NODE
1,0.,0.,0.000000000
2,0.,0.,152.400000000
3,0.,0.,304.800000000
4,0.,0.,457.200000000
5,0.,0.,609.600000000
6,0.,0.,762.000000000
7,0.,0.,914.400000000
8,0.,0.,1066.800000000
9,0.,0.,1219.200000000
10,0.,0.,1371.600000000
11,0.,0.,1524.000000000
12,0.,0.,1676.400000000
13,0.,0.,1828.800000000
14,0.,0.,1981.200000000
15,0.,0.,2133.600000000
16,0.,0.,2286.000000000
17,0.,0.,2438.400000000
18,0.,0.,2590.800000000
19,0.,0.,2743.200000000
20,0.,0.,2895.600000000
21,0.,0.,3048.000000000
22,0.,0.,3200.400000000
23,0.,0.,3352.800000000
24,0.,0.,3505.200000000
25,0.,0.,3657.600000000
*ELEMENT,TYPE=B31,ELSET=COL
1,1,2
2,2,3
3,3,4
4,4,5
5,5,6
6,6,7
7,7,8
8,8,9
9,9,10
10,10,11
11,11,12
12,12,13
13,13,14
14,14,15
15,15,16
16,16,17
17,17,18
18,18,19
19,19,20
20,20,21
21,21,22
22,22,23
23,23,24
24,24,25
*NSET,NSET=BOTTOM
1
*NSET,NSET=TOP
25
*MATERIAL,NAME=STEEL
*ELASTIC
206000.000000000,0.300000
*BEAM SECTION,ELSET=COL,MATERIAL=STEEL,SECTION=RECT
346.319662899,346.319662899
0.,1.,0.
*STEP
*BUCKLE
6,0.01
*BOUNDARY
BOTTOM,1,3
BOTTOM,6,6
TOP,1,2
*CLOAD
25,3,-1.
*NODE FILE
U
*END STEP
