*HEADING
V8C composite W validation v8c_w_f93_c605_12wf133
*NODE
1,0.,0.,0.000000000
2,0.,0.,152.400000000
3,0.,0.,304.800000000
4,0.,0.,457.200000000
5,0.,0.,609.600000000
6,0.,0.,762.000000000
7,0.,0.,914.400000000
8,0.,0.,1066.800000000
9,0.,0.,1219.200000000
10,0.,0.,1371.600000000
11,0.,0.,1524.000000000
12,0.,0.,1676.400000000
13,0.,0.,1828.800000000
14,0.,0.,1981.200000000
15,0.,0.,2133.600000000
16,0.,0.,2286.000000000
17,0.,0.,2438.400000000
18,0.,0.,2590.800000000
19,0.,0.,2743.200000000
20,0.,0.,2895.600000000
21,0.,0.,3048.000000000
22,0.,0.,3200.400000000
23,0.,0.,3352.800000000
24,0.,0.,3505.200000000
25,0.,0.,3657.600000000
*ELEMENT,TYPE=B31,ELSET=WEB
1,1,2
2,2,3
3,3,4
4,4,5
5,5,6
6,6,7
7,7,8
8,8,9
9,9,10
10,10,11
11,11,12
12,12,13
13,13,14
14,14,15
15,15,16
16,16,17
17,17,18
18,18,19
19,19,20
20,20,21
21,21,22
22,22,23
23,23,24
24,24,25
*ELEMENT,TYPE=B31,ELSET=TOP
25,1,2
26,2,3
27,3,4
28,4,5
29,5,6
30,6,7
31,7,8
32,8,9
33,9,10
34,10,11
35,11,12
36,12,13
37,13,14
38,14,15
39,15,16
40,16,17
41,17,18
42,18,19
43,19,20
44,20,21
45,21,22
46,22,23
47,23,24
48,24,25
*ELEMENT,TYPE=B31,ELSET=BOTTOM
49,1,2
50,2,3
51,3,4
52,4,5
53,5,6
54,6,7
55,7,8
56,8,9
57,9,10
58,10,11
59,11,12
60,12,13
61,13,14
62,14,15
63,15,16
64,16,17
65,17,18
66,18,19
67,19,20
68,20,21
69,21,22
70,22,23
71,23,24
72,24,25
*NSET,NSET=BASE
1
*NSET,NSET=TOPNODE
25
*MATERIAL,NAME=STEEL
*ELASTIC
206000.0,0.3
*BEAM SECTION,ELSET=WEB,MATERIAL=STEEL,SECTION=RECT
19.177000000,277.063200000
1.,0.,0.
*BEAM SECTION,ELSET=TOP,MATERIAL=STEEL,SECTION=RECT,OFFSET2=-4.912621359
314.071000000,31.394400000
1.,0.,0.
*BEAM SECTION,ELSET=BOTTOM,MATERIAL=STEEL,SECTION=RECT,OFFSET2=4.912621359
314.071000000,31.394400000
1.,0.,0.
*STEP
*BUCKLE
6,0.01
*BOUNDARY
BASE,1,3
BASE,6,6
TOPNODE,1,2
*CLOAD
25,3,-1.
*NODE FILE
U
*END STEP
