*HEADING
V8C composite W validation v8c_w_f93_c705_14wf48
*NODE
1,0.,0.,0.000000000
2,0.,0.,152.400000000
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*ELEMENT,TYPE=B31,ELSET=WEB
1,1,2
2,2,3
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*ELEMENT,TYPE=B31,ELSET=TOP
25,1,2
26,2,3
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*ELEMENT,TYPE=B31,ELSET=BOTTOM
49,1,2
50,2,3
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*NSET,NSET=BASE
1
*NSET,NSET=TOPNODE
25
*MATERIAL,NAME=STEEL
*ELASTIC
206000.0,0.3
*BEAM SECTION,ELSET=WEB,MATERIAL=STEEL,SECTION=RECT
8.610600000,320.649600000
1.,0.,0.
*BEAM SECTION,ELSET=TOP,MATERIAL=STEEL,SECTION=RECT,OFFSET2=-11.144182125
203.987400000,15.062200000
1.,0.,0.
*BEAM SECTION,ELSET=BOTTOM,MATERIAL=STEEL,SECTION=RECT,OFFSET2=11.144182125
203.987400000,15.062200000
1.,0.,0.
*STEP
*BUCKLE
6,0.01
*BOUNDARY
BASE,1,3
BASE,6,6
TOPNODE,1,2
*CLOAD
25,3,-1.
*NODE FILE
U
*END STEP
